P_2 := 7.25*10^6
P_а := 0.02*10^6
# 3. Построение газодинамического тракта
I_уп := 3609.98
P_п := 700
F`_кр := 0.0002523
F`_а := 0.0099085
m_р := P_п*10^3/I_уп = 193.907
φ_с := 0.98
F_кр := F`_кр*m_р = 0.0489227
φ_β := 0.98
F_крд := F_кр/φ_с = 0.0499211
φ := φ_с*φ_β = 0.9604
F_а := F`_а*m_р = 1.92133
F_ад := F_а/φ_с^2 = 2.00055
L_пр := 1.5
V_кс := L_пр*F_крд = 0.0748817
d_кс := nthroot(4*V_кс/π, 3) = 0.456838
L_кс := d_кс = 0.456838
R_кр := sqrt(F_крд/π) = 0.126057
D_кр := 2*R_кр = 0.252114
R_а := sqrt(F_ад/π) = 0.797994
R_а*2 = 1.59599
R_с1 := 0.25*d_кс = 0.114209
R_с2 := 0.7*D_кр = 0.17648
R_с3 := 0.45*R_кр = 0.0567257
R_а/R_кр = 6.33042
L_a := 15.5*R_кр = 1.95388
# 5. Расчет смесительной головки
ρ_о := 1135
ρ_г := 416
υ := 3.5504
m_др := m_р/φ = 201.902
m_дг := m_р/((1 + υ)*φ) = 44.3702
m_до := m_р/φ - m_дг = 157.532
# 5.2 Расчет струйных форсунок для пристеночного слоя.
d_кс = 0.456838
ρ_г = 416
m_дг = 44.3702
Δp_фг := 2*10^6
n_сф := π*(d_кс - 0.016)/0.015 = 92.3288
μ_ф := 0.65
m_сфг := 0.05*m_дг/n_сф = 0.0240284
F_сфг := m_сфг/(μ_ф*sqrt(2*Δp_фг*ρ_г)) = 9.06221e-7
ω_г := μ_ф*sqrt(2*Δp_фг/ρ_г) = 63.7377
d_сфг := sqrt(4*F_сфг/π) = 0.00107417
# 5.3 Расчет центробежных форсунок
# 5.3.1. Форсунки горючего
n_цфг := 187
m_цфг := 0.95*m_дг/n_цфг = 0.22541
Δp_ф := 2*10^6
μ_ф := 0.42
F_сг := m_цфг/(μ_ф*sqrt(2*Δp_ф*ρ_г)) = 1.31567e-5
A := 1
d_сг := round(sqrt(4*F_сг/π), 3) = 0.004
r_сг := d_сг/2 = 0.002
i := 2
R_вх := 1.1*r_сг = 0.0022
m_вх := m_цфг/i = 0.112705
Динамическая
r_вх := round(sqrt(R_вх*r_сг/(i*A)), 4) = 0.0015
вязкость
d_вх := 2*r_вх = 0.003
η := 102.8*10^-6
Re_вх := 4*m_цфг/(η*π*d_вх*sqrt(i)) = 658043
Для_правильной_работы_маткада
lg(λ) := 25.8/log(Re_вх)^2.58 - 2 = -1.72556
λ := 0
λ := 10^lg(λ) = 0.0188124
log(0.02) = -1.69897
A_э := R_вх*r_сг/(i*r_вх^2 + λ/2*R_вх*(R_вх - r_сг)) = 0.976879
|(A - A_э)/A|*100 = 2.31207
l_вх := 1.1*d_вх = 0.0033
l_сг := 0.5*d_сг = 0.002
h := R_вх = 0.0022
R_з := R_вх + r_вх = 0.0037
R_фг := sqrt(R_з^2 + l_вх^2 + 2*l_вх*sqrt(R_з^2 - R_вх^2)) = 0.00664938
δ := R_фг - R_з = 0.00294938
# 5.3.2. Форсунки окислителя
n_цфо := 424
m_цфо := m_дг/n_цфг = 0.237274
m_цфо = 0.237274
ρ_о = 1135
Δp_ф := 2*10^6
μ_ф := 0.42
F_со := m_цфо/(μ_ф*sqrt(2*Δp_ф*ρ_о)) = 8.38441e-6
A := 1
d_со := round(sqrt(4*F_со/π), 3) = 0.003
r_со := d_со/2 = 0.0015
i := 3
R_вх := 1.1*r_со = 0.00165
m_вх := m_цфо/i = 0.0790913
Динамическая
r_вх := round(sqrt(R_вх*r_со/(i*A)), 4) = 0.0009
вязкость
d_вх := 2*r_вх = 0.0018
η := 190*10^-6
Re_вх := 4*m_цфо/(η*π*d_вх*sqrt(i)) = 510004
Для_правильной_работы_маткада
lg(λ) := 25.8/log(Re_вх)^2.58 - 2 = -1.71161
λ := 0
λ := 10^lg(λ) = 0.0194261
A_э := R_вх*r_со/(i*r_вх^2 + λ/2*R_вх*(R_вх - r_со)) = 1.01751
|(A - A_э)/A|*100 = 1.75119
l_вх := 1.1*d_вх = 0.00198
l_со := 0.5*d_со = 0.0015
h := R_вх = 0.00165
R_з := R_вх + r_вх = 0.00255
R_фо := sqrt(R_з^2 + l_вх^2 + 2*l_вх*sqrt(R_з^2 - R_вх^2)) = 0.004257
δ := R_фо - R_з = 0.001707
# 5.4 Проверка радиусов форсунок
R_фо = 0.004257
R_фг = 0.00664938
R_фо + R_фг = 10.9064*10^-3  # м
# 6. Расчет турбонасосного агрегата
ΔP_охл := 0.5*10^6
ΔP_ф := 2*10^6
P_подг := P_2 + ΔP_охл + ΔP_ф = 9750000
P_подо := P_2 + ΔP_ф = 9250000
P_нд := 0.2*10^6
P_вх := P_нд = 200000
P_sг := 10^5
P_sо := 10^5
# 6.1 Расчет насосов
Q_г := m_дг/ρ_г = 0.106659
H_г := (P_подг - P_вх)/ρ_г = 22956.7
c_кр := 3000
ω_maxг := c_кр*((P_вх - P_sг)/ρ_г)^(3/4)/(298*sqrt(Q_г)) = 1881.85
Q_о := m_до/ρ_о = 0.138795
H_о := (P_подо - P_вх)/ρ_о = 7973.57
ω_maxо := c_кр*((P_вх - P_sо)/ρ_о)^(3/4)/(298*sqrt(Q_о)) = 777.091
ω_о := 0.95*ω_maxо = 738.236
ω_г := 0.95*ω_maxг = 1787.76
ω_min := ω_о
ω := ω_min = 738.236
n_sг := 193.3*ω*sqrt(Q_г)/H_г^(3/4) = 24.9887
n_sо := 193.3*ω*sqrt(Q_о)/H_о^(3/4) = 63.0049
η_о := 0.9
η_г := 0.7
η_м := 0.85
η_н := η_о*η_г*η_м = 0.5355
N_нг := Q_г*H_г*ρ_г/η_н = 1902138
M_кр1 := N_нг/ω = 2576.6
N_но := Q_о*H_о*ρ_о/η_о = 1395658
M_кр2 := N_но/ω = 1890.53
M_кр := M_кр1 + M_кр2 = 4467.13
τ := 9.4*10^8
d_в := nthroot(5.1*M_кр/τ, 3) = 0.0289395
d_вт := 1.2*d_в = 0.0347273
# 6.2. Расчет насоса горючего
Q_од := Q_г/η_о = 0.11851
k_о := 5
D_1э := 0.47*k_о*nthroot(Q_од/ω, 3) = 0.127719
D_о := sqrt(D_1э^2 + d_вт^2) = 0.132356
D_1 := D_о = 0.132356
c_о := Q_од/(π/4*D_1э^2) = 9.25031
b_1 := 0.375*D_1э^2/D_1 = 0.0462165
u_1 := D_1*ω/2 = 48.8549
ψ_1 := 0.85
Здесь_надо_варировать  # ψ_1
δ_1 := 0.003
чтобы_была_близка_к_конечной
z := 6
c_1m := Q_од/(π*D_1*b_1*ψ_1) = 7.25515
β_1 := atan(c_1m/u_1) = 0.147426
β_1 = 8.44691°
Δβ_л := 15° = 0.261799
β_1л := β_1 + Δβ_л = 23.4469°
β_1л = 0.409226
ψ_1 := 1 - δ_1*z/(π*D_1*sin(β_1л)) = 0.891206
c_1m := Q_од/(π*D_1*b_1*ψ_1) = 6.9197
Δβ_л := 15° = 0.261799
β_1 := atan(c_1m/u_1) = 0.140702
β_1 = 8.06162°
β_1л := β_1 + Δβ_л = 0.402501
β_1л = 23.0616°
k_н := 0.5
u_2 := sqrt(H_г/(k_н*η_г)) = 256.107
D_2' := 2*u_2/ω = 0.693834
β_2 := 60°
z := 6.5*(D_2' + D_1)/(D_2' - D_1)*sin((β_1л + β_2)/2) = 6.34145
z := round(z) = 6
c_2m := c_1m
ψ_2 := 1 - δ_1*z/(π*D_2'*sin(β_2)) = 0.990465
b_2 := Q_од/(π*D_2'*c_2m*ψ_2) = 0.00793275
ψ := 0.6 + 0.6*sin(β_2) = 1.11962
p := 2*ψ/z*1/(1 - (D_1/D_2')^2) = 0.387299
H_T∞ := H_г/η_г*(1 + p) = 45496.9
u_2 := c_2m/(2*tan(β_2)) + sqrt((c_2m/(2*tan(β_2)))^2 + H_T∞) = 215.307
D_21' := 2*u_2/ω = 0.583301
γ := |(D_21' - D_2')/D_21'|*100 = 18.9496
z := 6.5*(D_21' + D_1)/(D_21' - D_1)*sin((β_1л + β_2)/2) = 6.83948
z := round(z) = 7
ψ_2 := 1 - δ_1*z/(π*D_21'*sin(β_2)) = 0.986767
b_2 := Q_од/(π*D_21'*c_2m*ψ_2) = 0.00947133
ψ := 0.6 + 0.6*sin(β_2) = 1.11962
p := 2*ψ/z*1/(1 - (D_1/D_21')^2) = 0.337254
H_T∞ := H_г/η_г*(1 + p) = 43855.7
u_2 := c_2m/(2*tan(β_2)) + sqrt((c_2m/(2*tan(β_2)))^2 + H_T∞) = 211.425
D_22' := 2*u_2/ω = 0.572783
γ := |(D_22' - D_21')/D_22'|*100 = 1.83629
# 6.3 Расчет насоса горючего
Q_од := Q_о/η_о = 0.154216
k_о := 5
D_1э := 0.47*k_о*nthroot(Q_од/ω, 3) = 0.139438
D_о := sqrt(D_1э^2 + d_вт^2) = 0.143697
D_1 := D_о = 0.143697
c_о := Q_од/(π/4*D_1э^2) = 10.0991
b_1 := 0.375*D_1э^2/D_1 = 0.0507391
u_1 := D_1*ω/2 = 53.0411
ψ_1 := 0.85
Здесь_надо_варировать  # ψ_1
δ_1 := 0.003
чтобы_была_близка_к_конечной
z := 6
c_1m := Q_од/(π*D_1*b_1*ψ_1) = 7.92084
β_1 := atan(c_1m/u_1) = 0.148238
β_1 = 8.49344°
Δβ_л := 15° = 0.261799
β_1л := β_1 + Δβ_л = 23.4934°
β_1л = 0.410038
ψ_1 := 1 - δ_1*z/(π*D_1*sin(β_1л)) = 0.899979
c_1m := Q_од/(π*D_1*b_1*ψ_1) = 7.48096
Δβ_л := 15° = 0.261799
β_1 := atan(c_1m/u_1) = 0.140117
β_1 = 8.02809°
β_1л := β_1 + Δβ_л = 0.401916
β_1л = 23.0281°
k_н := 0.5
u_2 := sqrt(H_о/(k_н*η_о)) = 133.113
D_2' := 2*u_2/ω = 0.360624
β_2 := 30°
z := 6.5*(D_2' + D_1)/(D_2' - D_1)*sin((β_1л + β_2)/2) = 6.74601
z := round(z) = 7
c_2m := c_1m
ψ_2 := 1 - δ_1*z/(π*D_2'*sin(β_2)) = 0.962928
b_2 := Q_од/(π*D_2'*c_2m*ψ_2) = 0.0188962
ψ := 0.6 + 0.6*sin(β_2) = 0.9
p := 2*ψ/z*1/(1 - (D_1/D_2')^2) = 0.305677
H_T∞ := H_о/η_о*(1 + p) = 11567.7
u_2 := c_2m/(2*tan(β_2)) + sqrt((c_2m/(2*tan(β_2)))^2 + H_T∞) = 114.227
D_21' := 2*u_2/ω = 0.309459
γ := |(D_21' - D_2')/D_21'|*100 = 16.5339
z := 6.5*(D_21' + D_1)/(D_21' - D_1)*sin((β_1л + β_2)/2) = 7.93263
z := round(z) = 8
ψ_2 := 1 - δ_1*z/(π*D_21'*sin(β_2)) = 0.950627
b_2 := Q_од/(π*D_21'*c_2m*ψ_2) = 0.0223054
ψ := 0.6 + 0.6*sin(β_2) = 0.9
p := 2*ψ/z*1/(1 - (D_1/D_21')^2) = 0.286851
H_T∞ := H_о/η_о*(1 + p) = 11400.9
u_2 := c_2m/(2*tan(β_2)) + sqrt((c_2m/(2*tan(β_2)))^2 + H_T∞) = 113.45
D_22' := 2*u_2/ω = 0.307354
γ := |(D_22' - D_21')/D_22'|*100 = 0.684696
# 7. ЖГГ, Турбина ТНА
N_нг = 1902138
N_но = 1395658
N_т := N_нг + N_но = 3297796
Т_гг := 1200.02
p_вхд := 7.25*10^6
p_вых := 6.894*10^6
R := 624.552
γ := 1.14698
L_ад := γ/(γ - 1)*R*Т_гг*(1 - (p_вых/p_вхд)^(γ/(γ - 1))) = 1900298
c_ад := sqrt(2*L_ад) = 1949.51
u := 0.2*c_ад = 389.902
ω = 738.236
r := u/ω = 0.528154
d := 2*r = 1.05631
η_т := 0.425
m_гг := N_т/(L_ад*η_т) = 4.08332
ν_гг := 0.7584
m_огг := ν_гг*m_гг/(1 + ν_гг) = 1.76114
m_ггг := 1*m_гг/(1 + ν_гг) = 2.32218
m_огг + m_ггг = 4.08332
# 8. Построение высотной и дроссельной характеристик ЖРД
β := 1828.92
P_п = 700
P_2 = 7250000
K_п := P_п*10^3/(F_крд*P_2) = 1.93409
P_н := 0.10132
P_з(m) := K_п*β*m - F_ад*P_н*10^6
K_п*β = 3537.29
F_ад*P_н*10^6 = 202696
P_пп(m) := K_п*β*m
m_р = 193.907
m_min := 0.18*P_н*10^6*F_кр*P_2/(β*P_а) = 176.844
# Дроссельная характеристика
# [plot: P_з(m), P_пп(m) vs m]
# P | -P_з(m)  -P_пп(m)
m
# [Excel component]
    H := excel["A2:A31"]
    p := excel["B2:B31"]
P_п = 700
F_ад = 2.00055
P := P_п*10^3 - p*F_ад
max(P) = 700000
# [plot: P vs H]
P
H
